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/batch
! ANSYS input file written by Workbench version 16.0 RELEASE
! File used for geometry attach: C:\Semestre\Cursando\Elementos_Finitos\Tarea HG\Pollito\Pollito_files\dp0\SYS\DM\SYS.agdb
/title,Pollito--Steady-State Thermal (A5)
/com,--- Data in consistent MKS units. See Solving Units in the help system for more information.
/units,MKS
/prep7
! Turn off shape checking because checks already performed inside WB mesher.
! See help system for more information.
SHPP,OFF,,NOWARN
etcon,set             ! allow ANSYS to choose best KEYOP's for 180x elements
/com,*********** Nodes for the whole assembly ***********
nblock,3
(1i9,3e20.9e3)
        1    4.137916022E-001    4.867187148E-001    3.417318642E-001
        2    4.143347046E-001    4.864225108E-001    3.398023810E-001
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-1
/com,*********** Elements for Body 1 "Solid" ***********
et,1,87
eblock,19,solid,,21989
(19i9)
        1        1        1        1        0        0        0        0       10        0     6658    15792    16055    15856    17559    41444    41898    41441    41447
    42900    41901
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-1
/com,*********** Elements for Body 2 "Solid" ***********
et,2,87
eblock,19,solid,,6657
(19i9)
        2        2        2        2        0        0        0        0       10        0        1      206      207     1833     1281     3451     3467     3458     3454
     3464     9321
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-1
/com,*********** Elements for Body 3 "Solid" ***********
et,3,87
eblock,19,solid,,22573
(19i9)
        3        3        3        3        0        0        0        0       10        0    28647    51303    55551    54639    54236    63251    84433    63250    63248
    81999    81995
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-1
/com,*********** Send User Defined Coordinate System(s) ***********
csys,0
toffst,273.15,  ! Temperature offset from absolute zero
/com,*********** Send Materials ***********
MP,KXX,1,79,	! W m^-1 C^-1
MP,DENS,1,7870,	! kg m^-3
MP,C,1,447,	! J kg^-1 C^-1

MP,KXX,2,0.604,	! W m^-1 C^-1
MP,DENS,2,997.4,	! kg m^-3
MP,C,2,4179,	! J kg^-1 C^-1

MP,KXX,3,0.026,	! W m^-1 C^-1
MP,DENS,3,1.1614,	! kg m^-3
MP,C,3,1007,	! J kg^-1 C^-1
MP,MURX,3,1,

!************************* Model Summary ********************
!Solid,	Iron,	matid,	1
!Solid,	Water Fresh,	matid,	2
!Solid,	Air,	matid,	3
!************************* End Model Summary ********************
/com,*********** Create Contact "Contact Region" ***********
*set,tid,5
*set,cid,4
r,tid
r,cid
et,tid,170
et,cid,174
eblock,10,,,3064
(15i9)
    51220        5        5        5        0    13907    14075    14054    14054    30005    30886    14054    30004
    51221        5        5        5        0    13934    14034    13964    13964    30230    30457    13964    30226
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-1
eblock,10,,,3064
(15i9)
    54284        4        4        4        0    13907    14075    14054    14054    30005    30886    14054    30004
    54285        4        4        4        0    13934    14034    13964    13964    30230    30457    13964    30226
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-1
eblock,10,,,3088
(15i9)
    57348        4        5        4        0    53142    53161    53186    53186    73957    74039    53186    73958
    57349        4        5        4        0    53085    53173    53141    53141    73540    73949    53141    73539
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-1
eblock,10,,,3088
(15i9)
    60436        5        4        5        0    53142    53161    53186    53186    73957    74039    53186    73958
    60437        5        4        5        0    53085    53173    53141    53141    73540    73949    53141    73539
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-1
keyo,cid,8,2               ! auto create asymmetric contact (from Program Controlled setting)
keyo,cid,10,2              ! adjust contact stiffness each NR iteration (from Program Controlled setting)
keyo,cid,12,5              ! bonded always
keyo,cid,2,0               ! augmented Lagrange (from Program Controlled setting)
keyo,cid,4,0               ! on Gauss point (from Program Controlled setting)
keyo,cid,9,1               ! ignore initial gaps/penetration
keyo,cid,7,0               ! No Prediction
rmod,tid,3,10.	! FKN
rmod,tid,5,0.	! ICONT
rmod,tid,6,0.	! PINB
rmod,tid,10,0.	! CNOF
rmod,tid,12,0.	! FKT
rmod,tid,36,31	! WB DSID
rmod,cid,3,10.	! FKN
rmod,cid,5,0.	! ICONT
rmod,cid,6,0.	! PINB
rmod,cid,10,0.	! CNOF
rmod,cid,12,0.	! FKT
rmod,cid,36,31	! WB DSID
*set,_maxkxx,790000.
rmod,cid,14,_maxkxx/_ASMDIAG         ! TCC, Divide by Length since Traction Based
rmod,tid,14,_maxkxx/_ASMDIAG      ! TCC, Divide by Length since Traction Based
keyo,cid,1,2     ! Pure thermal contact
/com,*********** Create Contact "Contact Region 2" ***********
*set,tid,7
*set,cid,6
r,tid
r,cid
et,tid,170
et,cid,174
eblock,10,,,2754
(15i9)
    63524        7        7        7        0        2      669        3        3     1936     1943        3     1934
    63525        7        7        7        0        1        3      669      669     1923     1943      669     1926
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-1
eblock,10,,,2754
(15i9)
    66278        6        6        6        0        2      669        3        3     1936     1943        3     1934
    66279        6        6        6        0        1        3      669      669     1923     1943      669     1926
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-1
eblock,10,,,2612
(15i9)
    69032        6        7        6        0    50438    51098    50440    50440    57234    57252    50440    57229
    69033        6        7        6        0    50439    50440    51098    51098    57243    57252    51098    57245
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-1
eblock,10,,,2612
(15i9)
    71644        7        6        7        0    50438    51098    50440    50440    57234    57252    50440    57229
    71645        7        6        7        0    50439    50440    51098    51098    57243    57252    51098    57245
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-1
keyo,cid,8,2               ! auto create asymmetric contact (from Program Controlled setting)
keyo,cid,10,2              ! adjust contact stiffness each NR iteration (from Program Controlled setting)
keyo,cid,12,5              ! bonded always
keyo,cid,2,0               ! augmented Lagrange (from Program Controlled setting)
keyo,cid,4,0               ! on Gauss point (from Program Controlled setting)
keyo,cid,9,1               ! ignore initial gaps/penetration
keyo,cid,7,0               ! No Prediction
rmod,tid,3,10.	! FKN
rmod,tid,5,0.	! ICONT
rmod,tid,6,0.	! PINB
rmod,tid,10,0.	! CNOF
rmod,tid,12,0.	! FKT
rmod,tid,36,34	! WB DSID
rmod,cid,3,10.	! FKN
rmod,cid,5,0.	! ICONT
rmod,cid,6,0.	! PINB
rmod,cid,10,0.	! CNOF
rmod,cid,12,0.	! FKT
rmod,cid,36,34	! WB DSID
*set,_maxkxx,790000.
rmod,cid,14,_maxkxx/_ASMDIAG         ! TCC, Divide by Length since Traction Based
rmod,tid,14,_maxkxx/_ASMDIAG      ! TCC, Divide by Length since Traction Based
keyo,cid,1,2     ! Pure thermal contact
nsel,all
esel,all
/com,*********** Define Temperature Constraint ***********
CMBLOCK,_CM43   ,NODE,    10023
(8i10)
     11878     11879     11880     11881     11882     11883     11884     11885
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
*DIM,_loadvari43,TABLE,2,1,1,TIME,
! Time values
_loadvari43(1,0,1) = 0.
_loadvari43(2,0,1) = 1.
! Load values
_loadvari43(1,1,1) = 22.
_loadvari43(2,1,1) = 450.

/com,*********** Define Temperature Constraint ***********
CMBLOCK,_CM45   ,NODE,      335
(8i10)
       355       390       500       505       506       516       517       518
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
*DIM,_loadvari45,TABLE,2,1,1,TIME,
! Time values
_loadvari45(1,0,1) = 0.
_loadvari45(2,0,1) = 1.
! Load values
_loadvari45(1,1,1) = 22.
_loadvari45(2,1,1) = 22.

fcum,add                   ! add nodal forces up (needed in case have loads on the same edge,vertex)
fcum                       ! reset default on fcum command since done sending WB F loads
/com,***************** Define Uniform Initial temperature ***************
tunif,22.
fini
/com,****************************************************************************
/com,*************************    SOLUTION       ********************************
/com,****************************************************************************
/solu
antype,0                   ! static analysis
neqit,1,force              ! Force 1 eq iteration since only nonlinearity is bonded/no sep contact
pred,off
!eqsl,sparse               ! using sparse solver which is default so no eqsl command needed
cntr,print,1               ! print out contact info and also make no initial contact an error
resc,,none                 ! Do not keep any restart files
rstsuppress,cont           ! Don't write contact results
/com,****************************************************
/com,******************* SOLVE FOR LS 1 ****************
d,_CM43,temp,%_loadvari43%
d,_CM45,temp,%_loadvari45%
autots,on
nsub,1,10,1
time,1.
outres,erase
outres,all,none
outres,nsol,all
outres,rsol,all
outres,fflux,all
cnvtol,heat,,.001,,1.e-006	! Program Controlled. Set MINREF equivalent of 1e-6 Watts
! *********** WB SOLVE COMMAND ***********
! check interactive state
*get,ANSINTER_,active,,int
*if,ANSINTER_,ne,0,then
/eof
*endif
solve
/com *************** Write FE CONNECTORS *********
CEWRITE,file,ce,,INTE
/com,****************************************************
/com,*************** FINISHED SOLVE FOR LS 1 *************
*set,_DS_PROGRESS          ! turn off progress updates to avoid virus scanning bug
/post1
fini
